// COMSOL Multiphysics 5.6.0.280 model "625-engtest.mph"
// Outline of the model tree
// Unit system: none

Parameters
  a = 2.8e-4
  b = 5e-3
  tau = .1
  k = -.005

Geometry
  geom1 "Geometry 1" (2D, length unit m)
    sq1: Square | base = center; size = 0.02
    fin: Finalize "Form Union"

Physics
  g: GeneralFormPDE on all domains
    dependent variable u = {u, v}
    Units.SourceTermQuantity = concentration
    gfeq1: GeneralFormPDE (default) | f = {u-u*3-v+k, u-v}; Ga = {{a*ux, 0}, {b*vx, 0}}; da = {1, 0, 0, tau}
    zflx1: ZeroFluxBoundary "Zero Flux 1" (default)
    init1: init "Initial Values 1" (default)
    dir1: DirichletBoundary "Dirichlet Boundary Condition 1" on all boundaries | r = {0, 0}

Mesh
  mesh1 "Mesh 1" (physics-controlled)

Studies
  std1 "Study 1"
    time: Transient "Time Dependent" | tlist = range(0,0.001,9)

Solver configurations
  sol1 "solution 1" (study std1)
    v1: Variables "Dependent Variables 1"
    t1: Time "Time-Dependent Solver 1" | tlist = range(0,0.001,9)
      dDef: Direct
      fc1: FullyCoupled | linsolver = dDef

Datasets
  dset1: Solution | solution = sol1

Plots
  pg1: PlotGroup2D "2D Plot Group 1" | data = dset1
    surf1: Surface "t" | expr = u; title = t=4.000s

Exports
  img3: Image "t=1s"
    size = manualweb
    unit = px
    width = 640
    height = 480
    pngfilename = C:\Users\lenovo\Desktop\t=1.png
  img4: Image "t=2s" | size = manualweb; unit = px; width = 640; height = 480
  img5: Image "t3" | size = manualweb; unit = px; width = 640; height = 480; pngfilename = C:\Users\lenovo\Desktop\t3.png
  img6: Image "t2" | size = manualweb; unit = px; width = 640; height = 480; pngfilename = C:\Users\lenovo\Desktop\t=2.png
  anim1: Animation | target = player; giffilename = C:\Users\lenovo\Desktop\Untitled.gif; maxframes = 75; frametime = 0.25